*Heading
** Job name: Job-2 Model name: Model-1
** Generated by: Abaqus/CAE 2023
*Preprint, echo=NO, model=NO, history=NO, contact=NO
**
** PARTS
**
*Part, name=Wing_box_merge
*Node
      1,          60.,           0.,         -70.
      2,          30.,           0.,         -70.
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*Element, type=S4R
 1,   1,  50, 436,  61
 2,  50,  51, 437, 436
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*Nset, nset=ribs
   3,   4,   6,   7,   8,   9
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*Elset, elset=ribs
  25,  26,  27,  28,  29,  30
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*Nset, nset=inner
    1,    2,    3,    4,    5,    6
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*Elset, elset=inner
   83,   84,   85,   86,   87,   88
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*Nset, nset=outer
    1,    2,    3,    4,    5,    6
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*Elset, elset=outer
    1,    2,    3,    4,    5,    6
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** Section: alum_out
*Shell Section, elset=outer, material=aluminium
0.5, 5
*Orientation, name=Ori-1
1., 0., 0., 0., 1., 0.
3, 0.
** Region: (carbon_epoxy-1: Generated From Layup)
*Elset, elset=carbon_epoxy-1
  25,  26,  27,  28,  29,  30
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** Section: carbon_epoxy-1
*Shell Section, elset=carbon_epoxy-1, composite, orientation=Ori-1, layup=carbon_epoxy
0.01, 3, carbin-epoxy, 0., Ply-1
0.01, 3, carbin-epoxy, 90., Ply-2
0.01, 3, carbin-epoxy, 45., Ply-3
0.01, 3, carbin-epoxy, -45., Ply-4
0.01, 3, carbin-epoxy, 0., Ply-5
0.01, 3, carbin-epoxy, 90., Ply-6
0.01, 3, carbin-epoxy, 45., Ply-7
0.01, 3, carbin-epoxy, -45., Ply-8
0.01, 3, carbin-epoxy, 0., Ply-9
0.01, 3, carbin-epoxy, 90., Ply-10
0.01, 3, carbin-epoxy, 45., Ply-11
0.01, 3, carbin-epoxy, -45., Ply-12
0.01, 3, carbin-epoxy, 0., Ply-13
0.01, 3, carbin-epoxy, 90., Ply-14
0.01, 3, carbin-epoxy, 45., Ply-15
0.01, 3, carbin-epoxy, -45., Ply-16
0.01, 3, carbin-epoxy, 0., Ply-17
0.01, 3, carbin-epoxy, 90., Ply-18
0.01, 3, carbin-epoxy, 45., Ply-19
0.01, 3, carbin-epoxy, -45., Ply-20
** Section: alum_in
*Shell Section, elset=inner, material=aluminium
0.1, 5
*End Part
**
**
** ASSEMBLY
**
*Assembly, name=Assembly
**
*Instance, name=Wing_box_merge-4, part=Wing_box_merge
*End Instance
**
*Nset, nset=_PickedSet43, internal, instance=Wing_box_merge-4
  14,  15,  16,  19,  21,  30
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*Elset, elset=_PickedSet43, internal, instance=Wing_box_merge-4
  102,  106,  110,  114,  118,  122
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*Nset, nset=_PickedSet44, internal, instance=Wing_box_merge-4
 1, 5
*Elset, elset=_Surf-5_SPOS, internal, instance=Wing_box_merge-4
   99,  100,  101,  102,  103,  104
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*Elset, elset=_Surf-5_SNEG, internal, instance=Wing_box_merge-4
  123,  124,  125,  126,  127,  128
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*Surface, type=ELEMENT, name=Surf-5
_Surf-5_SPOS, SPOS
_Surf-5_SNEG, SNEG
*Elset, elset=_Surf-6_SPOS, internal, instance=Wing_box_merge-4
   13,   14,   15,   16,   17,   18
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*Elset, elset=_Surf-6_SNEG, internal, instance=Wing_box_merge-4
    1,    2,    3,    4,    5,    6
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*Surface, type=ELEMENT, name=Surf-6
_Surf-6_SPOS, SPOS
_Surf-6_SNEG, SNEG
*End Assembly
**
** MATERIALS
**
*Material, name=aluminium
*Density
2700.,
*Elastic
 7e+10, 0.3
*Material, name=carbin-epoxy
*Damage Initiation, criterion=HASHIN
 2.899e+09, 1.414e+09,   3.7e+07,  1.69e+08,  1.34e+08,   1.2e+08
*Density
1600.,
*Elastic, type=LAMINA
 1.62e+11, 7.93e+09,     0.35,  5.3e+09,  5.3e+09,    4e+09
**
** BOUNDARY CONDITIONS
**
** Name: BC-1 Type: Symmetry/Antisymmetry/Encastre
*Boundary
_PickedSet43, ENCASTRE
** ----------------------------------------------------------------
**
** STEP: load
**
*Step, name=load, nlgeom=NO, inc=10000000
step-1
*Static, stabilize, factor=1e-05, allsdtol=0.05, continue=NO
0.01, 1., 1e-06, 1.
**
** LOADS
**
** Name: Load-1   Type: Concentrated force
*Cload
_PickedSet44, 2, -43164.
** Name: lift   Type: Pressure Using Field: AnalyticalField-1
*Dload
Wing_box_merge-4.13, P, -682253.
Wing_box_merge-4.14, P, -563369.
Wing_box_merge-4.15, P, -441695.
Wing_box_merge-4.16, P, -316687.
Wing_box_merge-4.17, P, -190058.
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Wing_box_merge-4.1224, P, 804830.
** Name: pressure   Type: Pressure
*Dsload
Surf-5, P, 69.76
**
** CONTROLS
**
*Controls, reset
*Controls, analysis=discontinuous
*Controls, parameters=time incrementation
, , , , , , , 20, , ,
**
** OUTPUT REQUESTS
**
*Restart, write, frequency=0
**
** FIELD OUTPUT: F-Output-2
**
*Output, field
*Element Output, elset=Wing_box_merge-4.carbon_epoxy-1, directions=YES
2, 5, 8, 11, 14, 17, 20, 23, 26, 29, 32, 35, 38, 41, 44, 47
HSNFCCRT, HSNFTCRT, HSNMCCRT, HSNMTCRT
*Element Output, elset=Wing_box_merge-4.carbon_epoxy-1, directions=YES
50, 53, 56, 59
HSNFCCRT, HSNFTCRT, HSNMCCRT, HSNMTCRT
**
** FIELD OUTPUT: F-Output-1
**
*Output, field, variable=PRESELECT
**
** HISTORY OUTPUT: H-Output-1
**
*Output, history, variable=PRESELECT
*End Step
